// SBML level 2 version 4

function MMWithKcat_1(Smad2, TGFbR_EE, _kSmad2Phos_kcat, kSmad2Phos_km)
  _kSmad2Phos_kcat*TGFbR_EE*Smad2/(kSmad2Phos_km + Smad2);
end

function Function_for_TGF_R1(TGFb, TGFbR, _kTGFbOn)
  _kTGFbOn*TGFbR*TGFb;
end

function NonCompetitiveInhibition(km, ki, Vmax, n, I, S)
  Vmax*S/((km + S)*(1 + (I/ki)^n));
end

function MM_5(kErkDephos_Vmax, kErkDephos_km, ppErk)
  kErkDephos_Vmax*ppErk/(kErkDephos_km + ppErk);
end

function MM_6(kErkDephos_Vmax, kErkDephos_km, pErk)
  kErkDephos_Vmax*pErk/(kErkDephos_km + pErk);
end

function MM_2(kRafDephosVmax, kRafDephos_km, pRaf)
  kRafDephosVmax*pRaf/(kRafDephos_km + pRaf);
end

function CompetitiveInhibitionWithKcat_1(AZD, Mek, _kMekPhos_ki, kMekPhos_kcat, kMekPhos_km1, pRaf)
  kMekPhos_kcat*pRaf*Mek/(kMekPhos_km1 + Mek + kMekPhos_km1*AZD/_kMekPhos_ki);
end

function MM_3(kMekDephos_Vmax, kMekDephos_km, ppMek)
  kMekDephos_Vmax*ppMek/(kMekDephos_km + ppMek);
end

function MM_4(kMekDephos_Vmax, kMekDephos_km, pMek)
  kMekDephos_Vmax*pMek/(kMekDephos_km + pMek);
end

function MM_1(kSmad2Dephos_Vmax, kSmad2Dephos_km, pSmad2)
  kSmad2Dephos_Vmax*pSmad2/(kSmad2Dephos_km + pSmad2);
end

function Function_for_MAPK_R0(GrowthFactors, Raf, kRafPhos_Vmax, kRafPhos_ki, kRafPhos_km, kRafPhos_n, ppErk)
  GrowthFactors*NonCompetitiveInhibition(kRafPhos_km, kRafPhos_ki, kRafPhos_Vmax, kRafPhos_n, ppErk, Raf);
end

function MMWithKcat_7(PI3K, TGFbR_Cav, _kPI3KPhosByTGFbR_kcat, kPI3KPhosByTGFbR_km)
  _kPI3KPhosByTGFbR_kcat*TGFbR_Cav*PI3K/(kPI3KPhosByTGFbR_km + PI3K);
end

function MM_7(kAktDephos_Vmax, kAktDephos_km, pAkt)
  kAktDephos_Vmax*pAkt/(kAktDephos_km + pAkt);
end

function CompetitiveInhibitionWithKcat_4(Everolimus, _kmTORC1Phos_kcat, _kmTORC1Phos_ki, kmTORC1Phos_km, mTORC1, pAkt)
  _kmTORC1Phos_kcat*pAkt*mTORC1/(kmTORC1Phos_km + mTORC1 + kmTORC1Phos_km*Everolimus/_kmTORC1Phos_ki);
end

function MM_9(kS6KDephos_Vmax, kS6KDephos_km, pS6K)
  kS6KDephos_Vmax*pS6K/(kS6KDephos_km + pS6K);
end

function MMWithKcat_5(Raf, TGFbR_Cav, _kRafPhosByTGFbR_kcat, kRafPhosByTGFbR_km)
  _kRafPhosByTGFbR_kcat*TGFbR_Cav*Raf/(kRafPhosByTGFbR_km + Raf);
end

function CompetitiveInhibitionWithKcat_3(Akt, MK2206, _kAktPhos_kcat, _kAktPhos_ki, kAktPhos_km, pPI3K)
  _kAktPhos_kcat*pPI3K*Akt/(kAktPhos_km + Akt + kAktPhos_km*MK2206/_kAktPhos_ki);
end

function MMWithKcat_3(kErkPhos_kcat, kErkPhos_km1, pErk, ppMek)
  kErkPhos_kcat*ppMek*pErk/(kErkPhos_km1 + pErk);
end

function Function_for_CrossTalkR4(_kPI3KDephosByErk, pPI3K, ppErk)
  _kPI3KDephosByErk*pPI3K*ppErk;
end

function MMWithKcat_6(Raf, _kRafPhosByPI3K_kcat, kRafPhosByPI3K_km, pPI3K)
  _kRafPhosByPI3K_kcat*pPI3K*Raf/(kRafPhosByPI3K_km + Raf);
end

function MM_8(_kmTORC1Dephos_Vmax, kmTORC1Dephos_km, pmTORC1)
  _kmTORC1Dephos_Vmax*pmTORC1/(kmTORC1Dephos_km + pmTORC1);
end

function MMWithKcat_4(S6K, _kS6KPhosBymTORC1_kcat, kS6KPhosBymTORC1_km, pmTORC1)
  _kS6KPhosBymTORC1_kcat*pmTORC1*S6K/(kS6KPhosBymTORC1_km + S6K);
end

function MMWithKcat_2(Erk, kErkPhos_kcat, kErkPhos_km1, ppMek)
  kErkPhos_kcat*ppMek*Erk/(kErkPhos_km1 + Erk);
end

function CompetitiveInhibitionWithKcat_2(AZD, _kMekPhos_ki, kMekPhos_kcat, kMekPhos_km1, pMek, pRaf)
  kMekPhos_kcat*pRaf*pMek/(kMekPhos_km1 + pMek + kMekPhos_km1*AZD/_kMekPhos_ki);
end

function Function_for_PI3K_R1(GrowthFactors, PI3K, _kPI3KPhosByGF)
  _kPI3KPhosByGF*PI3K*GrowthFactors;
end

function Function_for_PI3K_R2(_kPI3KDephosByS6K, pPI3K, pS6K)
  _kPI3KDephosByS6K*pPI3K*pS6K;
end

model CrossTalkModel()

  // Compartments:
  compartment Cell = 1;

  // Species:
  species TGFbR in Cell = 76.83968;
  species TGFbR_a in Cell = 0.9667187;
  species TGFbR_EE in Cell = 12.55033;
  species TGFbR_Cav in Cell = 9.667187;
  species Smad2 in Cell = 49.6779;
  species pSmad2 in Cell = 0.500563;
  species Mek in Cell = 252.8763;
  species pMek in Cell = 56.06426;
  species Erk in Cell = 183.3319;
  species pErk in Cell = 117.8822;
  species PI3K in Cell = 99.9603;
  species pPI3K in Cell = 0.03969725;
  species Akt in Cell = 99.41324;
  species pAkt in Cell = 0.5867592;
  species mTORC1 in Cell = 90.27246;
  species pmTORC1 in Cell = 9.727544;
  species S6K in Cell = 90.50699;
  species pS6K in Cell = 9.493014;
  species Raf in Cell = 87.9326;
  species pRaf in Cell = 12.0674;
  species ppMek in Cell = 29.02951;
  species ppErk in Cell = 43.08626;

  // Parameters:
  _kTGFbOn = 7.740931;
  TGFb = 0.005;
  kTGFbOff = 1;
  kTGFbRIntern = 0.33;
  kTGFbRRecyc = 0.033;
  kSmad2Phos_km = 50;
  _kSmad2Phos_kcat = 2.11835;
  kSmad2Dephos_km = 60;
  kSmad2Dephos_Vmax = 65;
  GrowthFactors = 1;
  kRafPhos_km = 10;
  kRafPhos_ki = 3.5;
  kRafPhos_Vmax = 9000;
  kRafPhos_n = 1;
  kRafDephos_km = 8;
  kRafDephosVmax = 3602.5;
  kMekPhos_km1 = 15;
  _kMekPhos_ki = 4.010142;
  kMekPhos_kcat = 90;
  AZD = 0;
  kMekDephos_km = 15;
  kMekDephos_Vmax = 2700;
  kErkPhos_km1 = 50;
  kErkPhos_kcat = 200;
  kErkDephos_km = 15;
  kErkDephos_Vmax = 1800;
  _kPI3KPhosByGF = 672.3;
  _kPI3KDephosByS6K = 0.03821234;
  kAktPhos_km = 12.5;
  _kAktPhos_ki = 10.78755;
  _kAktPhos_kcat = 0.01760319;
  MK2206 = 0;
  kAktDephos_km = 15;
  kAktDephos_Vmax = 30;
  kmTORC1Phos_km = 3;
  _kmTORC1Phos_ki = 2.796748;
  _kmTORC1Phos_kcat = 4.832576;
  Everolimus = 1;
  kmTORC1Dephos_km = 100;
  _kmTORC1Dephos_Vmax = 1.524779;
  kS6KPhosBymTORC1_km = 100;
  _kS6KPhosBymTORC1_kcat = 0.4266085;
  kS6KDephos_km = 10;
  kS6KDephos_Vmax = 50;
  kRafPhosByTGFbR_km = 25;
  _kRafPhosByTGFbR_kcat = 5.430009;
  kRafPhosByPI3K_km = 50;
  _kRafPhosByPI3K_kcat = 165.6276;
  kPI3KPhosByTGFbR_km = 10;
  _kPI3KPhosByTGFbR_kcat = 6.422278;
  _kPI3KDephosByErk = 1.787767;
  _kmTORCPhosBasal_km = 262.3508;

  // Assignment rules:
  Smad2Tot := pSmad2 + Smad2;

  // Reactions:
  TGF_R1: TGFbR => TGFbR_a; Cell*Function_for_TGF_R1(TGFb, TGFbR, _kTGFbOn);
  TGF_R2: TGFbR_a => TGFbR; Cell*kTGFbOff*TGFbR_a;
  TGF_R3: TGFbR_a => TGFbR_EE; Cell*kTGFbRIntern*TGFbR_a;
  TGF_R4: TGFbR_EE => TGFbR_a; Cell*kTGFbRRecyc*TGFbR_EE;
  TGF_R5: TGFbR_a => TGFbR_Cav; Cell*kTGFbRIntern*TGFbR_a;
  TGF_R6: TGFbR_Cav => TGFbR_a; Cell*kTGFbRRecyc*TGFbR_Cav;
  TGF_R8: Smad2 => pSmad2; Cell*MMWithKcat_1(Smad2, TGFbR_EE, _kSmad2Phos_kcat, kSmad2Phos_km);  // modifiers: TGFbR_EE
  TGF_R9: pSmad2 => Smad2; Cell*MM_1(kSmad2Dephos_Vmax, kSmad2Dephos_km, pSmad2);
  MAPK_R0: Raf => pRaf; Cell*Function_for_MAPK_R0(GrowthFactors, Raf, kRafPhos_Vmax, kRafPhos_ki, kRafPhos_km, kRafPhos_n, ppErk);  // modifiers: ppErk
  MAPK_R1: pRaf => Raf; Cell*MM_2(kRafDephosVmax, kRafDephos_km, pRaf);
  MAPK_R2: Mek => pMek; Cell*CompetitiveInhibitionWithKcat_1(AZD, Mek, _kMekPhos_ki, kMekPhos_kcat, kMekPhos_km1, pRaf);  // modifiers: pRaf
  MAPK_R3: pMek => ppMek; Cell*CompetitiveInhibitionWithKcat_2(AZD, _kMekPhos_ki, kMekPhos_kcat, kMekPhos_km1, pMek, pRaf);  // modifiers: pRaf
  MAPK_R4: ppMek => pMek; Cell*MM_3(kMekDephos_Vmax, kMekDephos_km, ppMek);
  MAPK_R5: pMek => Mek; Cell*MM_4(kMekDephos_Vmax, kMekDephos_km, pMek);
  MAPK_R6: Erk => pErk; Cell*MMWithKcat_2(Erk, kErkPhos_kcat, kErkPhos_km1, ppMek);  // modifiers: ppMek
  MAPK_R7: pErk => ppErk; Cell*MMWithKcat_3(kErkPhos_kcat, kErkPhos_km1, pErk, ppMek);  // modifiers: ppMek
  MAPK_R8: ppErk => pErk; Cell*MM_5(kErkDephos_Vmax, kErkDephos_km, ppErk);
  MAPK_R9: pErk => Erk; Cell*MM_6(kErkDephos_Vmax, kErkDephos_km, pErk);
  PI3K_R1: PI3K => pPI3K; Cell*Function_for_PI3K_R1(GrowthFactors, PI3K, _kPI3KPhosByGF);
  PI3K_R2: pPI3K => PI3K; Cell*Function_for_PI3K_R2(_kPI3KDephosByS6K, pPI3K, pS6K);  // modifiers: pS6K
  PI3K_R3: Akt => pAkt; Cell*CompetitiveInhibitionWithKcat_3(Akt, MK2206, _kAktPhos_kcat, _kAktPhos_ki, kAktPhos_km, pPI3K);  // modifiers: pPI3K
  PI3K_R4: pAkt => Akt; Cell*MM_7(kAktDephos_Vmax, kAktDephos_km, pAkt);
  PI3K_R5_1: mTORC1 => pmTORC1; Cell*CompetitiveInhibitionWithKcat_4(Everolimus, _kmTORC1Phos_kcat, _kmTORC1Phos_ki, kmTORC1Phos_km, mTORC1, pAkt);  // modifiers: pAkt
  PI3K_R6: pmTORC1 => mTORC1; Cell*MM_8(_kmTORC1Dephos_Vmax, kmTORC1Dephos_km, pmTORC1);
  PI3K_R7: S6K => pS6K; Cell*MMWithKcat_4(S6K, _kS6KPhosBymTORC1_kcat, kS6KPhosBymTORC1_km, pmTORC1);  // modifiers: pmTORC1
  PI3K_R8: pS6K => S6K; Cell*MM_9(kS6KDephos_Vmax, kS6KDephos_km, pS6K);
  CrossTalkR1: Raf => pRaf; Cell*MMWithKcat_5(Raf, TGFbR_Cav, _kRafPhosByTGFbR_kcat, kRafPhosByTGFbR_km);  // modifiers: TGFbR_Cav
  CrossTalkR2: Raf => pRaf; Cell*MMWithKcat_6(Raf, _kRafPhosByPI3K_kcat, kRafPhosByPI3K_km, pPI3K);  // modifiers: pPI3K
  CrossTalkR3: PI3K => pPI3K; Cell*MMWithKcat_7(PI3K, TGFbR_Cav, _kPI3KPhosByTGFbR_kcat, kPI3KPhosByTGFbR_km);  // modifiers: TGFbR_Cav
  CrossTalkR4: pPI3K => PI3K; Cell*Function_for_CrossTalkR4(_kPI3KDephosByErk, pPI3K, ppErk);  // modifiers: ppErk

  // Events:
  SerumStarveRemoveTGFb: at (time > 70.25): TGFb = 0;
  SerumStarveRemoveGrowthFactors: at (time > 70.25): GrowthFactors = 0;
  AddTGFb: at (time > 71.25): TGFb = 1;
  AddAZD: at (time > 24): AZD = 1;

  // Unit definitions:
  unit time = 3600 second;
  unit substance = 1e-9 mole;
end
