// SBML level 2 version 4

function Function_for_R5_1(Mek, kMekPhosByPI3K, pPI3K)
  kMekPhosByPI3K*Mek*pPI3K;
end

function Function_for_R5_2(Mek, TGFbR_a, kMekPhosByTGFbR_a)
  kMekPhosByTGFbR_a*Mek*TGFbR_a;
end

function Function_for_R5_3(Mek, kMekPhosByIGFR, pIGFR)
  kMekPhosByIGFR*Mek*pIGFR;
end

function Function_for_R6_2(AZD, kMekDephosByAZD, pMek)
  kMekDephosByAZD*pMek*AZD;
end

function Function_for_R9(GrowthFactors, IGFR, kIGFRPhos)
  kIGFRPhos*IGFR*GrowthFactors;
end

function Function_for_R11_1(PI3K, kPI3KPhosByIGFR, pIGFR)
  kPI3KPhosByIGFR*PI3K*pIGFR;
end

function Function_for_R6_1(kMekDephosByAkt, pAkt, pMek)
  kMekDephosByAkt*pMek*pAkt;
end

function Function_for_R11_2(PI3K, kPI3KPhosByMek, pMek)
  kPI3KPhosByMek*PI3K*pMek;
end

function Function_for_R12_1(kPI3KDephosByS6K, pPI3K, pS6K)
  kPI3KDephosByS6K*pPI3K*pS6K;
end

function Function_for_R3(Smad2, TGFbR_a, kSmad2Phos)
  kSmad2Phos*Smad2*TGFbR_a;
end

function Function_for_R12_2(PI3K, kPI3KDephosByErk, pErk)
  kPI3KDephosByErk*PI3K*pErk;
end

function Function_for_R7(Erk, kErkPhosByMek, pMek)
  kErkPhosByMek*Erk*pMek;
end

function Function_for_R14(Akt, MK2206, kAktDephos)
  kAktDephos*Akt*MK2206;
end

function Function_for_R13(Akt, kAktPhos, pPI3K)
  kAktPhos*Akt*pPI3K;
end

function K_M_S(K, M, S)
  K*M*S;
end
K_M_S is "K*M*S";

function Function_for_R15_1(kmTORC1PhosByAkt, mTORC1, pAkt)
  kmTORC1PhosByAkt*mTORC1*pAkt;
end

function Function_for_R17_1(S6K, kS6KPhosBymTORC1, pmTORC1)
  kS6KPhosBymTORC1*S6K*pmTORC1;
end

function Function_for_R16(Everolimus, kmTORC1DePhos, pmTORC1)
  kmTORC1DePhos*pmTORC1*Everolimus;
end

function Function_for_R17_2(S6K, kS6KPhosByErk, pErk)
  kS6KPhosByErk*S6K*pErk;
end

function Function_for_R15_2(kmTORC1PhosByErk, mTORC1, pErk)
  kmTORC1PhosByErk*mTORC1*pErk;
end

model TGFbModule()

  // Compartments:
  compartment Cell = 1;

  // Species:
  species TGFbR in Cell = 100;
  species TGFbR_a in Cell = 0;
  species Smad2 in Cell = 100;
  species pSmad2 in Cell = 0;
  species Mek in Cell = 100;
  species pMek in Cell = 0;
  species Erk in Cell = 100;
  species pErk in Cell = 0;
  species IGFR in Cell = 100;
  species pIGFR in Cell = 0;
  species PI3K in Cell = 100;
  species pPI3K in Cell = 0;
  species Akt in Cell = 100;
  species pAkt in Cell = 0;
  species mTORC1 in Cell = 100;
  species pmTORC1 in Cell = 0;
  species S6K in Cell = 100;
  species pS6K in Cell = 0;
  species TGFb_0 in Cell = 1;

  // Parameters:
  AZD = 0;
  GrowthFactors = 0.001;
  MK2206 = 0;
  Everolimus = 0;
  TGFbOn = 0.01;
  kTGFbOff = 0.01;
  kSmad2Phos = 0.01;
  kSmad2Dephos = 0.01;
  kMekPhosByPI3K = 0.01;
  kMekPhosByTGFbR_a = 0.01;
  kMekPhosByIGFR = 0.01;
  kMekDephosByAkt = 0.01;
  kMekDephosByAZD = 0.01;
  kErkPhosByMek = 0.01;
  kErkDephos = 0.01;
  kIGFRPhos = 0.01;
  kIGFRDephos = 0.01;
  kPI3KPhosByIGFR = 0.01;
  kPI3KPhosByMek = 0.01;
  kPI3KDephosByS6K = 0.01;
  kPI3KDephosByErk = 0.01;
  kAktPhos = 0.01;
  kAktDephos = 0.01;
  kmTORC1PhosByAkt = 0.01;
  kmTORC1PhosByErk = 0.01;
  kmTORC1DePhos = 0.01;
  kS6KPhosBymTORC1 = 0.01;
  kS6KPhosByErk = 0.01;
  kS6KDephos = 0.01;
  kTGFbOn = 0.01;

  // Reactions:
  R1: TGFbR => TGFbR_a; Cell*K_M_S(TGFbOn, TGFb_0, TGFbR);  // modifiers: TGFb_0
  R2: TGFbR_a => TGFbR; Cell*kTGFbOff*TGFbR_a;
  R3: Smad2 => pSmad2; Cell*Function_for_R3(Smad2, TGFbR_a, kSmad2Phos);  // modifiers: TGFbR_a
  R4: pSmad2 => Smad2; Cell*kSmad2Dephos*pSmad2;
  R5_1: Mek => pMek; Cell*Function_for_R5_1(Mek, kMekPhosByPI3K, pPI3K);  // modifiers: pPI3K
  R5_2: Mek => pMek; Cell*Function_for_R5_2(Mek, TGFbR_a, kMekPhosByTGFbR_a);  // modifiers: TGFbR_a
  R5_3: Mek => pMek; Cell*Function_for_R5_3(Mek, kMekPhosByIGFR, pIGFR);  // modifiers: pIGFR
  R6_1: pMek => Mek; Cell*Function_for_R6_1(kMekDephosByAkt, pAkt, pMek);  // modifiers: pAkt
  R6_2: pMek => Mek; Cell*Function_for_R6_2(AZD, kMekDephosByAZD, pMek);
  R7: Erk => pErk; Cell*Function_for_R7(Erk, kErkPhosByMek, pMek);  // modifiers: pMek
  R8: pErk => Erk; Cell*kErkDephos*pErk;
  R9: IGFR => pIGFR; Cell*Function_for_R9(GrowthFactors, IGFR, kIGFRPhos);
  R10: pIGFR => IGFR; Cell*kIGFRDephos*pIGFR;
  R11_1: PI3K => pPI3K; Cell*Function_for_R11_1(PI3K, kPI3KPhosByIGFR, pIGFR);  // modifiers: pIGFR
  R11_2: PI3K => pPI3K; Cell*Function_for_R11_2(PI3K, kPI3KPhosByMek, pMek);  // modifiers: pMek
  R12_1: pPI3K => PI3K; Cell*Function_for_R12_1(kPI3KDephosByS6K, pPI3K, pS6K);  // modifiers: pS6K
  R12_2: pPI3K => PI3K; Cell*Function_for_R12_2(PI3K, kPI3KDephosByErk, pErk);  // modifiers: pErk
  R13: Akt => pAkt; Cell*Function_for_R13(Akt, kAktPhos, pPI3K);  // modifiers: pPI3K
  R14: pAkt => Akt; Cell*Function_for_R14(Akt, MK2206, kAktDephos);
  R15_1: mTORC1 => pmTORC1; Cell*Function_for_R15_1(kmTORC1PhosByAkt, mTORC1, pAkt);  // modifiers: pAkt
  R15_2: mTORC1 => pmTORC1; Cell*Function_for_R15_2(kmTORC1PhosByErk, mTORC1, pErk);  // modifiers: pErk
  R16: pmTORC1 => mTORC1; Cell*Function_for_R16(Everolimus, kmTORC1DePhos, pmTORC1);
  R17_1: S6K => pS6K; Cell*Function_for_R17_1(S6K, kS6KPhosBymTORC1, pmTORC1);  // modifiers: pmTORC1
  R17_2: S6K => pS6K; Cell*Function_for_R17_2(S6K, kS6KPhosByErk, pErk);  // modifiers: pErk
  R18: pS6K => S6K; Cell*kS6KDephos*pS6K;
end
