// SBML level 2 version 4

function MMWithKcat_1(Smad2, TGFbR_EE, kSmad2Phos_kcat, kSmad2Phos_km)
  kSmad2Phos_kcat*TGFbR_EE*Smad2/(kSmad2Phos_km + Smad2);
end

function MM_1(kSmad2Dephos_Vmax, kSmad2Dephos_km, pSmad2)
  kSmad2Dephos_Vmax*pSmad2/(kSmad2Dephos_km + pSmad2);
end

function NonCompetitiveInhibition(km, ki, Vmax, n, I, S)
  Vmax*S/((km + S)*(1 + (I/ki)^n));
end

function Function_for_TGF_R1(TGFb, TGFbR, kTGFbOn)
  kTGFbOn*TGFbR*TGFb;
end

function MM_2(kRafDephosVmax, kRafDephos_km, pRaf)
  kRafDephosVmax*pRaf/(kRafDephos_km + pRaf);
end

function MM_5(kErkDephos_Vmax1, kErkDephos_km1, ppErk)
  kErkDephos_Vmax1*ppErk/(kErkDephos_km1 + ppErk);
end

function CompetitiveInhibition_1(AZD, Mek, kMekPhos_kcat1, kMekPhos_ki1, kMekPhos_km1, pRaf)
  kMekPhos_kcat1*pRaf*Mek/(kMekPhos_km1 + Mek + kMekPhos_km1*AZD/kMekPhos_ki1);
end

function MM_3(kMekDephos_Vmax1, kMekDephos_km1, ppMek)
  kMekDephos_Vmax1*ppMek/(kMekDephos_km1 + ppMek);
end

function MM_4(kMekDephos_Vmax1, kMekDephos_km1, pMek)
  kMekDephos_Vmax1*pMek/(kMekDephos_km1 + pMek);
end

function Function_for_PI3K_R1(GrowthFactors, PI3K, kPI3KPhosByGF)
  kPI3KPhosByGF*PI3K*GrowthFactors;
end

function MM_6(kErkDephos_Vmax1, kErkDephos_km1, pErk)
  kErkDephos_Vmax1*pErk/(kErkDephos_km1 + pErk);
end

function CompetitiveInhibition_3(Akt, MK2206, kAktPhos_kcat, kAktPhos_ki, kAktPhos_km, pPI3K)
  kAktPhos_kcat*pPI3K*Akt/(kAktPhos_km + Akt + kAktPhos_km*MK2206/kAktPhos_ki);
end

function MM_7(kAktDephos_Vmax, kAktDephos_km, pAkt)
  kAktDephos_Vmax*pAkt/(kAktDephos_km + pAkt);
end

function MMWithKcat_4(S6K, kS6KPhosBymTORC1_kcat, kS6KPhosBymTORC1_km, pmTORC1)
  kS6KPhosBymTORC1_kcat*pmTORC1*S6K/(kS6KPhosBymTORC1_km + S6K);
end

function MMWithKcat_5(Raf, TGFbR_Cav, kRafPhosByTGFbR_kcat, kRafPhosByTGFbR_km)
  kRafPhosByTGFbR_kcat*TGFbR_Cav*Raf/(kRafPhosByTGFbR_km + Raf);
end

function Function_for_CrossTalkR4(kPI3KDephosByErk, pPI3K, ppErk)
  kPI3KDephosByErk*pPI3K*ppErk;
end

function MM_8(kmTORC1Dephos_Vmax, kmTORC1Dephos_km, pmTORC1)
  kmTORC1Dephos_Vmax*pmTORC1/(kmTORC1Dephos_km + pmTORC1);
end

function MMWithKcat_8(Smad2, kSmad2PhosByAkt_kcat, kSmad2PhosByAkt_km, pAkt)
  kSmad2PhosByAkt_kcat*pAkt*Smad2/(kSmad2PhosByAkt_km + Smad2);
end

function MMWithKcat_2(Erk, kErkPhos_kcat1, kErkPhos_km1, ppMek)
  kErkPhos_kcat1*ppMek*Erk/(kErkPhos_km1 + Erk);
end

function MMWithKcat_9(kSmad2DephosByErk_kcat, kSmad2DephosByErk_km, pSmad2n, ppErk)
  kSmad2DephosByErk_kcat*ppErk*pSmad2n/(kSmad2DephosByErk_km + pSmad2n);
end

function MM_9(kS6KDephos_Vmax, kS6KDephos_km, pS6K)
  kS6KDephos_Vmax*pS6K/(kS6KDephos_km + pS6K);
end

function CompetitiveInhibition_2(AZD, kMekPhos_kcat1, kMekPhos_ki1, kMekPhos_km1, pMek, pRaf)
  kMekPhos_kcat1*pRaf*pMek/(kMekPhos_km1 + pMek + kMekPhos_km1*AZD/kMekPhos_ki1);
end

function CompetitiveInhibition_4(Everolimus, kmTORC1Phos_kcat, kmTORC1Phos_ki, kmTORC1Phos_km, mTORC1, pAkt)
  kmTORC1Phos_kcat*pAkt*mTORC1/(kmTORC1Phos_km + mTORC1 + kmTORC1Phos_km*Everolimus/kmTORC1Phos_ki);
end

function MMWithKcat_6(Raf, kRafPhosByPI3K_kcat, kRafPhosByPI3K_km, pPI3K)
  kRafPhosByPI3K_kcat*pPI3K*Raf/(kRafPhosByPI3K_km + Raf);
end

function MMWithKcat_3(kErkPhos_kcat1, kErkPhos_km1, pErk, ppMek)
  kErkPhos_kcat1*ppMek*pErk/(kErkPhos_km1 + pErk);
end

function MMWithKcat_7(PI3K, TGFbR_Cav, kPI3KPhosByTGFbR_kcat, kPI3KPhosByTGFbR_km)
  kPI3KPhosByTGFbR_kcat*TGFbR_Cav*PI3K/(kPI3KPhosByTGFbR_km + PI3K);
end

function Function_for_PI3K_R2(kPI3KDephosByS6K, pPI3K, pS6K)
  kPI3KDephosByS6K*pPI3K*pS6K;
end

function Function_for_MAPK_R0(GrowthFactors, Raf, kRafPhos_Vmax, kRafPhos_ki, kRafPhos_km, kRafPhos_n, ppErk)
  GrowthFactors*NonCompetitiveInhibition(kRafPhos_km, kRafPhos_ki, kRafPhos_Vmax, kRafPhos_n, ppErk, Raf);
end

model TGFbModule()

  // Compartments:
  compartment Cell = 1;

  // Species:
  species TGFbR in Cell = 76.83968;
  species TGFbR_a in Cell = 0.9667187;
  species TGFbR_EE in Cell = 12.55033;
  species TGFbR_Cav in Cell = 9.667187;
  species Smad2 in Cell = 49.6779;
  species pSmad2 in Cell = 0.500563;
  species pSmad2n in Cell = 0.0447836;
  species Smad2n in Cell = 49.7768;
  species Mek in Cell = 252.8763;
  species pMek in Cell = 56.06426;
  species Erk in Cell = 183.3319;
  species pErk in Cell = 117.8822;
  species PI3K in Cell = 99.9603;
  species pPI3K in Cell = 0.03969725;
  species Akt in Cell = 99.41324;
  species pAkt in Cell = 0.5867592;
  species mTORC1 in Cell = 90.27246;
  species pmTORC1 in Cell = 9.727544;
  species S6K in Cell = 90.50699;
  species pS6K in Cell = 9.493014;
  species Raf in Cell = 87.9326;
  species pRaf in Cell = 12.0674;
  species ppMek in Cell = 29.02951;
  species ppErk in Cell = 43.08626;

  // Parameters:
  kTGFbOn = 0.1;
  TGFb = 0.005;
  kTGFbOff = 0.04;
  kTGFbRIntern = 0.3333333;
  kTGFbRRecyc = 0.03333333;
  kSmad2Phos_km = 50;
  kSmad2Phos_kcat = 0.00183203;
  kSmad2Dephos_km = 60;
  kSmad2Dephos_Vmax = 0.00987093;
  GrowthFactors = 1;
  kRafPhos_km = 10;
  kRafPhos_ki = 3.5;
  kRafPhos_Vmax = 9000;
  kRafPhos_n = 1;
  kRafDephos_km = 8;
  kRafDephosVmax = 3602.5;
  kMekPhos_km1 = 15;
  kMekPhos_ki1 = 0.25;
  kMekPhos_kcat1 = 0.001822152;
  AZD = 0;
  kMekDephos_km1 = 15;
  kMekDephos_Vmax1 = 2700;
  kErkPhos_km1 = 50;
  kErkPhos_kcat1 = 4.073626;
  kErkDephos_km1 = 15;
  kErkDephos_Vmax1 = 1800;
  kPI3KPhosByGF = 0.02366458;
  kPI3KDephosByS6K = 14.28626;
  kAktPhos_km = 12.5;
  kAktPhos_ki = 0.2538798;
  kAktPhos_kcat = 35.34554;
  MK2206 = 0;
  kAktDephos_km = 15;
  kAktDephos_Vmax = 30;
  kmTORC1Phos_km = 14.79575;
  kmTORC1Phos_ki = 0.08164733;
  kmTORC1Phos_kcat = 0.35;
  Everolimus = 1;
  kmTORC1Dephos_km = 100;
  kmTORC1Dephos_Vmax = 1;
  kS6KPhosBymTORC1_km = 100;
  kS6KPhosBymTORC1_kcat = 0.5643113;
  kS6KDephos_km = 10;
  kS6KDephos_Vmax = 50;
  kRafPhosByTGFbR_km = 25;
  kRafPhosByTGFbR_kcat = 0.006158178;
  kRafPhosByPI3K_km = 50;
  kRafPhosByPI3K_kcat = 0.006882522;
  kPI3KPhosByTGFbR_km = 10;
  kPI3KPhosByTGFbR_kcat = 3.390667;
  kPI3KDephosByErk = 0.1128163;
  kSmad2PhosByAkt_km = 40;
  kSmad2PhosByAkt_kcat = 0.01398669;
  kSmad2DephosByErk_km = 30;
  kSmad2DephosByErk_kcat = 58.4701;

  // Assignment rules:
  Smad2Tot := pSmad2 + Smad2 + pSmad2n + Smad2n;
  pSmad2Tot := pSmad2 + pSmad2n;

  // Reactions:
  TGF_R1: TGFbR => TGFbR_a; Cell*Function_for_TGF_R1(TGFb, TGFbR, kTGFbOn);
  TGF_R2: TGFbR_a => TGFbR; Cell*kTGFbOff*TGFbR_a;
  TGF_R3: TGFbR_a => TGFbR_EE; Cell*kTGFbRIntern*TGFbR_a;
  TGF_R4: TGFbR_EE => TGFbR_a; Cell*kTGFbRRecyc*TGFbR_EE;
  TGF_R5: TGFbR_a => TGFbR_Cav; Cell*kTGFbRIntern*TGFbR_a;
  TGF_R6: TGFbR_Cav => TGFbR_a; Cell*kTGFbRRecyc*TGFbR_Cav;
  TGF_R8: Smad2 => pSmad2; Cell*MMWithKcat_1(Smad2, TGFbR_EE, kSmad2Phos_kcat, kSmad2Phos_km);  // modifiers: TGFbR_EE
  TGF_R9: pSmad2 => Smad2; Cell*MM_1(kSmad2Dephos_Vmax, kSmad2Dephos_km, pSmad2);
  MAPK_R0: Raf => pRaf; Cell*Function_for_MAPK_R0(GrowthFactors, Raf, kRafPhos_Vmax, kRafPhos_ki, kRafPhos_km, kRafPhos_n, ppErk);  // modifiers: ppErk
  MAPK_R1: pRaf => Raf; Cell*MM_2(kRafDephosVmax, kRafDephos_km, pRaf);
  MAPK_R2: Mek => pMek; Cell*CompetitiveInhibition_1(AZD, Mek, kMekPhos_kcat1, kMekPhos_ki1, kMekPhos_km1, pRaf);  // modifiers: pRaf
  MAPK_R3: pMek => ppMek; Cell*CompetitiveInhibition_2(AZD, kMekPhos_kcat1, kMekPhos_ki1, kMekPhos_km1, pMek, pRaf);  // modifiers: pRaf
  MAPK_R4: ppMek => pMek; Cell*MM_3(kMekDephos_Vmax1, kMekDephos_km1, ppMek);
  MAPK_R5: pMek => Mek; Cell*MM_4(kMekDephos_Vmax1, kMekDephos_km1, pMek);
  MAPK_R6: Erk => pErk; Cell*MMWithKcat_2(Erk, kErkPhos_kcat1, kErkPhos_km1, ppMek);  // modifiers: ppMek
  MAPK_R7: pErk => ppErk; Cell*MMWithKcat_3(kErkPhos_kcat1, kErkPhos_km1, pErk, ppMek);  // modifiers: ppMek
  MAPK_R8: ppErk => pErk; Cell*MM_5(kErkDephos_Vmax1, kErkDephos_km1, ppErk);
  MAPK_R9: pErk => Erk; Cell*MM_6(kErkDephos_Vmax1, kErkDephos_km1, pErk);
  PI3K_R1: PI3K => pPI3K; Cell*Function_for_PI3K_R1(GrowthFactors, PI3K, kPI3KPhosByGF);
  PI3K_R2: pPI3K => PI3K; Cell*Function_for_PI3K_R2(kPI3KDephosByS6K, pPI3K, pS6K);  // modifiers: pS6K
  PI3K_R3: Akt => pAkt; Cell*CompetitiveInhibition_3(Akt, MK2206, kAktPhos_kcat, kAktPhos_ki, kAktPhos_km, pPI3K);  // modifiers: pPI3K
  PI3K_R4: pAkt => Akt; Cell*MM_7(kAktDephos_Vmax, kAktDephos_km, pAkt);
  PI3K_R5_1: mTORC1 => pmTORC1; Cell*CompetitiveInhibition_4(Everolimus, kmTORC1Phos_kcat, kmTORC1Phos_ki, kmTORC1Phos_km, mTORC1, pAkt);  // modifiers: pAkt
  PI3K_R6: pmTORC1 => mTORC1; Cell*MM_8(kmTORC1Dephos_Vmax, kmTORC1Dephos_km, pmTORC1);
  PI3K_R7: S6K => pS6K; Cell*MMWithKcat_4(S6K, kS6KPhosBymTORC1_kcat, kS6KPhosBymTORC1_km, pmTORC1);  // modifiers: pmTORC1
  PI3K_R8: pS6K => S6K; Cell*MM_9(kS6KDephos_Vmax, kS6KDephos_km, pS6K);
  CrossTalkR1: Raf => pRaf; Cell*MMWithKcat_5(Raf, TGFbR_Cav, kRafPhosByTGFbR_kcat, kRafPhosByTGFbR_km);  // modifiers: TGFbR_Cav
  CrossTalkR2: Raf => pRaf; Cell*MMWithKcat_6(Raf, kRafPhosByPI3K_kcat, kRafPhosByPI3K_km, pPI3K);  // modifiers: pPI3K
  CrossTalkR3: PI3K => pPI3K; Cell*MMWithKcat_7(PI3K, TGFbR_Cav, kPI3KPhosByTGFbR_kcat, kPI3KPhosByTGFbR_km);  // modifiers: TGFbR_Cav
  CrossTalkR4: pPI3K => PI3K; Cell*Function_for_CrossTalkR4(kPI3KDephosByErk, pPI3K, ppErk);  // modifiers: ppErk
  CrossTalkR5: Smad2 => pSmad2; Cell*MMWithKcat_8(Smad2, kSmad2PhosByAkt_kcat, kSmad2PhosByAkt_km, pAkt);  // modifiers: pAkt
  CrossTalkR6: pSmad2n => Smad2n; Cell*MMWithKcat_9(kSmad2DephosByErk_kcat, kSmad2DephosByErk_km, pSmad2n, ppErk);  // modifiers: ppErk

  // Events:
  SerumStarveRemoveTGFb: at (time > 70.25): TGFb = 0;
  SerumStarveRemoveGrowthFactors: at (time > 70.25): GrowthFactors = 0;
  AddTGFb: at (time > 71.25): TGFb = 1;
  AddAZD: at (time > 24): AZD = 1;

  // Unit definitions:
  unit time = 3600 second;
  unit substance = 1e-9 mole;
end
