// SBML level 2 version 4

function MA1Mod(k, M, S)
  k*M*S;
end

model mod2()

  // Compartments:
  compartment Cell = 1;

  // Species:
  species A in Cell = 1;
  species B in Cell = 1;
  species C in Cell = 1;
  species D in Cell = 1;
  species E in Cell = 1;
  species F_0 in Cell = 1;

  // Parameters:
  F = 1;
  k1 = 0.01;
  k2 = 0.01;
  k3 = 0.01;

  // Reactions:
  R1: A => B; Cell*k1*A;
  R2: B => A; Cell*MA1Mod(R2_k, C, B);  // modifiers: C
    R2_k = 0.1;
  R3: C => A; Cell*MA1Mod(R3_k, B, C);  // modifiers: B
    R3_k = 0.1;
  R4: D => E; Cell*MA1Mod(R4_k, F_0, D);  // modifiers: F_0
    R4_k = 0.1;
end
