// SBML level 3 version 1

function MM(km, S, Vmax)
  Vmax*S/(km + S);
end

function MMWithKcat(km, S, E, kcat)
  kcat*E*S/(km + S);
end

function NonCompetitiveInhibition(km, Ki, I, E, V, n)
  V*E/((1 + (I/Ki)^n)*(km + E));
end

function MA1Mod(k, S, M)
  k*M*S;
end

function MA2Mod(k, S1, S2, M)
  k*M*S1*S2;
end

function MA0(k)
  k;
end

function MA1(k, S)
  k*S;
end

function MA2(k, S1, S2)
  k*S1*S2;
end

function MA3(k, S1, S2, S3)
  k*S1*S2*S3;
end

model TGFbModule()
  // model units - substance: substance, time: time_unit, volume: volume

  // Compartments:
  compartment Cell = 1;

  // Species:
  species TGFbR in Cell = 100;
  species TGFbR_a in Cell = 0;
  species Smad2 in Cell = 100;
  species pSmad2 in Cell = 0;
  species GFR in Cell = 86.221;
  species pGFR in Cell = 13.779;
  species PI3K in Cell = 100;
  species pPI3K in Cell = 0;
  species TGFb in Cell = 0;

  // Parameters:
  Mek = 100;
  pMek = 0;
  Erk = 100;
  pErk = 0;
  Akt = 100;
  pAkt = 0;
  mTORC1 = 100;
  pmTORC1 = 0;
  S6K = 100;
  pS6K = 0;
  AZD = 0;
  GrowthFactors = 100;
  MK2206 = 0;
  Everolimus = 0;
  kFluxTGFbR = 0.1;
  kTGFbRDeg = 0.001;
  kTGFbOn = 0.01;
  kTGFbOff = 0.01;
  kSmad2Phos = 0.01;
  kSmad2Dephos = 0.01;
  kIGFRPhos_kcat = 100;
  kIGFRPhos_km = 2500;
  kIGFRPhos_h = 2;
  kIGFRDephos = 0.01;
  kPI3KPhosByIGFR = 0.01;
  kMekPhosByPI3K = 0.01;
  kMekPhosByTGFbR_a = 0.01;
  kMekPhosByIGFR = 0.01;
  kMekDephosByAkt = 0.01;
  kMekDephosByAZD = 0.01;
  kErkPhosByMek = 0.01;
  kErkDephos = 0.01;
  kPI3KPhosByMek = 0.01;
  kPI3KDephosByS6K = 0.01;
  kPI3KDephosByErk = 0.01;
  kAktPhos = 0.1;
  kAktDephos = 0.01;
  kmTORC1PhosByAkt = 0.001;
  kmTORC1PhosByErk = 0.001;
  kmTORC1Dephos = 0.01;
  kmTORC1DephosByEv = 0.01;
  kS6KPhosBymTORC1 = 0.001;
  kS6KPhosByErk = 0.001;
  kS6KDephos = 0.01;

  // Reactions:
  R1: => TGFbR; Cell*MA0(kFluxTGFbR);
  R2: TGFbR => ; Cell*MA1(kTGFbRDeg, TGFbR);
  R3: TGFbR + TGFb => TGFbR_a; Cell*MA2(kTGFbOn, TGFbR, TGFb);
  R4: TGFbR_a => TGFbR + TGFb; Cell*MA1(kTGFbOff, TGFbR_a);
  R5: Smad2 => pSmad2; Cell*MA1Mod(kSmad2Phos, Smad2, TGFbR_a);  // modifiers: TGFbR_a
  R6: pSmad2 => Smad2; Cell*MA1(kSmad2Dephos, pSmad2);
  R11: GFR => pGFR; Cell*(kIGFRPhos_kcat*GrowthFactors*GFR/(kIGFRPhos_km^kIGFRPhos_h + GFR^kIGFRPhos_h));
  R12: pGFR => GFR; Cell*MA1(kIGFRDephos, pGFR);
  R13_1: PI3K => pPI3K; Cell*MA1Mod(kPI3KPhosByIGFR, PI3K, pGFR);  // modifiers: pGFR

  // Unit definitions:
  unit volume = litre;
  unit time_unit = 3600 second;
  unit substance = 1e-9 mole;
end
