// SBML level 2 version 4

function K_M_S(K, M, S)
  K*M*S;
end

model New_Model()

  // Compartments:
  compartment compartment = 1;

  // Species:
  species A in compartment = 1;
  species B in compartment = 0;
  species C in compartment = 0;
  species D in compartment = 1;

  // Reactions:
  reaction: A => B; compartment*reaction_k1*A;
    reaction_k1 = 0.1;
  reaction_1: B => A; compartment*K_M_S(reaction_1_K, D, B);  // modifiers: D
    reaction_1_K = 0.1;
  reaction_2: C => D; compartment*K_M_S(reaction_2_K, B, C);  // modifiers: B
    reaction_2_K = 0.1;
  reaction_3: D => C; compartment*reaction_3_k1*D;
    reaction_3_k1 = 0.1;

  // Unit definitions:
  unit time = 3600 second;
  unit substance = 1e-9 mole;
end
